// SBML level 3 version 1

model Stochastic()
  // model units - substance: substance, time: time_unit, volume: volume

  // Compartments:
  compartment Cytoplasm = 5.25e-12 volume;
  compartment Nucleus = 1.75e-12 volume;

  // Species:
  species nuc_gene_a__LIGAND_ in Nucleus = 0.0009489016;
  species nuc_gene_i__LIGAND_ in Nucleus = 0.0009489016;
  species nuc_gene_a__RECEPTOR_ in Nucleus = 0.0009489016;
  species nuc_gene_i__RECEPTOR_ in Nucleus = 0.0009489016;
  species cyt_mrna__LIGAND_ in Cytoplasm = 0.001581503;
  species cyt_mrna__RECEPTOR_ in Cytoplasm = 0.001581503;

  // Parameters:
  kGac1_1 = 0.0005;
  kGac2_1 = 0.0005;
  kGin1_1 = 0.005;
  kGin2_1 = 0.005;
  kTC1_1 = 0.005;
  kTC2_1 = 0.005;
  kTCd1_1 = 5e-5;
  kTCd2_1 = 5e-5;
  cyt_prot__LIGAND_ = 0;
  cyt_prot__RECEPTOR_ = 100;
  cyt_prot__LIGAND__RECEPTOR_ = 0;
  kTL1_1 = 1;
  kTL2_1 = 1;
  kLR1_1 = 0.001;
  kLR2_1 = 0.001;
  kLR3_1 = 5e-5;
  kLR4_1 = 5e-5;
  kLR5_1 = 5e-5;

  // Reactions:
  vGac1: nuc_gene_i__LIGAND_ => nuc_gene_a__LIGAND_; kGac1_1*nuc_gene_i__LIGAND_*Nucleus;
  vGac2: nuc_gene_i__RECEPTOR_ => nuc_gene_a__RECEPTOR_; kGac2_1*nuc_gene_i__RECEPTOR_*Nucleus;
  vGin1: nuc_gene_a__LIGAND_ => nuc_gene_i__LIGAND_; kGin1_1*nuc_gene_a__LIGAND_*Nucleus;
  vGin2: nuc_gene_a__RECEPTOR_ => nuc_gene_i__RECEPTOR_; kGin2_1*nuc_gene_a__RECEPTOR_*Nucleus;
  vTC1: => cyt_mrna__LIGAND_; kTC1_1*nuc_gene_a__LIGAND_*Cytoplasm;  // modifiers: nuc_gene_a__LIGAND_
  vTC2: => cyt_mrna__RECEPTOR_; kTC2_1*nuc_gene_a__RECEPTOR_*Cytoplasm;  // modifiers: nuc_gene_a__RECEPTOR_
  vTCd1: cyt_mrna__LIGAND_ => ; kTCd1_1*cyt_mrna__LIGAND_*Cytoplasm;
  vTCd2: cyt_mrna__RECEPTOR_ => ; kTCd2_1*cyt_mrna__RECEPTOR_*Cytoplasm;

  // Unit definitions:
  unit volume = litre;
  unit time_unit = second;
  unit substance = 1e-9 mole;
  unit mpc = 1;
  unit molecule = 1;
end
